class test
{
	double x;
	double y[s];
	int32 n;
}

module tape;

object test
{
	object multiplayer
	{
		file "test_multiplayer.csv";
		indexname "datetime";
		property x;
		property y,n;
	};
}

object test
{
	object multiplayer
	{
		file "test_multiplayer.csv";
		indexname "datetime";
	};
}

#set savefile=test_multiplayer.json
