// pandas.glm
//
// Include this GLM file to enable pandas players and recorders
//

module glm_pandas;

class recorder
{
	string property;
	string file;
	double interval[s];
	string timezone;
	string dtformat;
	enumeration {NONE=0,INLINE=1,HEADER=2} units;
	bool flush;

	on_init "python:glm_pandas.recorder_init";
	on_commit "python:glm_pandas.recorder_commit";
}

class player
{
	string property;
	string file;
	string timezone;
	python options;

	on_init "python:glm_pandas.player_init";
	on_precommit "python:glm_pandas.player_precommit";
}
