// test whether ticket:114 is fixed

#set pythonpath=..:.
module recorder;

#set randomseed=1

#set module_compiler_flags=VERBOSE|DEBUG|KEEPWORK|CLEAN
#set force_compile=1
#include <math.h>

// run example for 1 day
clock {
	timezone PST+8PDT;
	starttime '2009-01-01 00:00:00 PST';
	stoptime '2009-01-01 01:00:00 PST';
}

// implement a deterministic noise source and signal target
class noise {
	double source; // deterministic source
	double signal; // destination for the noisy signal
	intrinsic sync(TIMESTAMP t0, TIMESTAMP t1)
	{
		// This provides the main noise source input.
		// You can source this from either the clock (t0)
		// or the elasping simulation time (t0-starttime)
		// or some other deterministic source you like.
		source = (double)t0;
		signal = source +(double)rand()/RAND_MAX;
		return t0+1; // update signal every second
	};
}

// record the output
object noise
{
	on_init "python:recorder.init";
	on_postsync "python:recorder.update";
	on_finalize "python:recorder.finish";
}

#ifexist "../test_c_include.csv"
#on_exit 0 diff ../test_c_include.csv test_c_include.csv > gridlabd.diff
#endif
