// test geodata create and merge directives

#ifexist "../test_geodata.txt"
#define DIR=..
#endif

#option redirect output:test_geodata.txt

#geodata help

#flush
#system sync

#on_exit 0 test -f ${modelname/.glm/.txt}
